*Heading
** Job name: simple_rat_600 Model name: simple_rat
** Generated by: Abaqus/CAE 2021
*Preprint, echo=NO, model=NO, history=NO, contact=NO
**
** PARTS
**
*Part, name=Part-1
*End Part
**
*Part, name=Part-2
*End Part
**
**
** ASSEMBLY
**
*Assembly, name=Assembly
**
*Instance, name=Part-1-1, part=Part-1
*Node
      1,           0.,           1.,           7.
      2,           0.,           1.,           0.
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*Element, type=C3D4
   1, 430,  72, 431, 432
   2, 430, 431, 218, 432
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*Nset, nset=Set-1, generate
   1,  567,    1
*Elset, elset=Set-1, generate
    1,  2038,     1
** Section: Section-1
*Solid Section, elset=Set-1, material=Material-1
,
*End Instance
**
*Instance, name=Part-2-1, part=Part-2
*Node
      1,           0.,           1.,           0.
      2,           0.,           1.,           7.
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*Element, type=C3D4
  1, 129,  42,  41,  32
  2, 130, 131, 106, 132
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*Nset, nset=Set-1, generate
   1,  178,    1
*Elset, elset=Set-1, generate
   1,  596,    1
** Section: Section-2
*Solid Section, elset=Set-1, material=Material-2
,
*End Instance
**
*Node
      1,           0.,           0.,           7.
*Nset, nset=RP
 1,
*Nset, nset=m_Set-1, instance=Part-1-1
   2,   3,  14,  15,  16,  17
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*Nset, nset=m_Set-1, instance=Part-2-1
  1,  3,  4,  5,  6,  7,  8,  9, 10, 11, 21, 22, 23, 24
*Nset, nset=m_Set-2, instance=Part-1-1
   1,   4,   5,   6,   7,   8
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*Nset, nset=m_Set-2, instance=Part-2-1
   2,  12,  13,  14,  15,  16,  17,  18,  19,  20, 125, 126, 127, 128
*Surface, type=NODE, name=m_Set-2_CNS_, internal
m_Set-2, 1.
** Constraint: TIE_LOAD
*Coupling, constraint name=TIE_LOAD, ref node=RP, surface=m_Set-2_CNS_
*Kinematic
*End Assembly
**
** MATERIALS
**
*Material, name=Material-1
*Elastic
5000., 0.3
*Material, name=Material-2
*Elastic
200., 0.167
** ----------------------------------------------------------------
**
** STEP: Step-1
**
*Step, name=Step-1, nlgeom=NO
*Static
1., 1., 1e-05, 1.
**
** OUTPUT REQUESTS
**
*Restart, write, frequency=0
**
** FIELD OUTPUT: F-Output-1
**
*Output, field, variable=PRESELECT
**
** HISTORY OUTPUT: H-Output-1
**
*Output, history, variable=PRESELECT
*End Step
